*NODE
1, 0.00000000000000e+00, 1.10000000000000e+01, 0.00000000000000e+00
2, 0.00000000000000e+00, 2.90000000000000e+01, 0.00000000000000e+00
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*NSET, NSET = leftNSET
1, 2, 3, 4, 5, 6, 7, 8,
9, 10, 11, 12, 13
*NSET, NSET = rightNSET
330, 331, 332, 333, 334, 335
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*NSET, NSET = lowerNSET
199, 200, 202, 204, 257, 260
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*NSET, NSET = upperNSET
99, 104, 107, 111, 114, 134
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*ELEMENT, TYPE=B21, ELSET=BeamElem1
1, 311, 290
2, 290, 283
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*NORMAL,TYPE=ELEMENT
1, 311, -1.000000, -3.000000, -0.000000
2, 290, -1.000000, -3.000000, -0.000000
3, 283, -1.000000, -3.000000, -0.000000
4, 271, -1.000000, -3.000000, -0.000000
5, 243, 15.000000, -2.000000, 0.000000
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359, 349, -0.500000, 5.500000, 0.000000
*BEAM SECTION, ELSET=BeamElem1, MATERIAL=BeamMatl, SECTION=CIRC
1.0000000e+00
0.000000, 0.000000, -1.000000
*MATERIAL, name=BeamMatl
*Elastic
1.00000e+02, 4.50000e-01
*Step, name=Step-1, nlgeom=YES
*Static, STABILIZE=2.0000e-04
1.00e-02, 1., 1.00e-05, 1.00e+00
*Boundary
leftNSET, 1,1,-3.125e+00
leftNSET, 2,2
leftNSET, 6,6
rightNSET, 1,1,3.125e+00
rightNSET, 2,2
rightNSET, 6,6
lowerNSET, 2,2,-3.125e+00
lowerNSET, 1,1
lowerNSET, 6,6
upperNSET, 2,2,3.125e+00
upperNSET, 1,1
upperNSET, 6,6
*Restart, write, frequency=0
*Output, history, variable=PRESELECT
*Output, field, variable=PRESELECT
*NODE OUTPUT
U, RF,COORD
*ELEMENT Output
S,SE,SF,SM,SK,COORD
*End Step
